*HEADING
Abaqus Job Created By SimLab 2017.2 .
*******************************************************************************
****		Created at 12:18:2, June 14,2018
****		NODES= 24117
****		ELEMENTS= 16975
*******************************************************************************
**NSET COUNT = 24117
*NODE,NSET=NALL
1,               16.00000,        0.00000,        0.00000
2,               15.21690,       -4.94427,        0.00000
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**
*ELEMENT,TYPE=DCOUP3D,ELSET=RBE98_24142
24142, 24142
*DISTRIBUTING COUPLING,ELSET=RBE98_24142
       601, 1.000000
       602, 1.000000
       603, 1.000000
       604, 1.000000
       605, 1.000000
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      2827, 1.000000
**HWCOLOR COMP         98     0
**
**ELSET COUNT = 16975
**HWCOLOR COMP          1     0
*ELEMENT, TYPE=C3D10, ELSET=Body1
      2141,      4645,      4666,      4667,      5586,     10973,     10976,     10975,
     17012,     19979,      3454
      2142,      4645,      4667,      4676,      5586,     10975,     11031,     17014,
     17012,      3454,     17013
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**
**NSET COUNT = 221
*NSET, NSET=Fixed_face_set
         1,         2,         3,         4,         5,         6
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**NSET COUNT = 221
*NSET, NSET=Coupling_nodes_set
       601,       602,       603,       604,       605,       606
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**Property Definitions
**
*SOLID SECTION, ELSET=Body1, MATERIAL=SteeL
**
**Material Definitions
**
**Material:SteeL
*MATERIAL,NAME=SteeL
*ELASTIC,TYPE=ISO
210.0e3,3.00000e-001
*DENSITY
7.80000e-009,
*SPECIFIC HEAT
5.00000e-001
*CONDUCTIVITY
4.98100e-002
**
**
**Face Constraint Face_Constraint_4
**
*NSET, NSET=Face_Constraint_4
      1562,         1,         2,      1340,      1341,         3
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**
*BOUNDARY
**Fixed constraints:Face_Constraint_4
Face_Constraint_4,	1
Face_Constraint_4,	2
Face_Constraint_4,	3
**
*Step,NLGEOM=YES,inc=100
*Static
0.000010,1.000000,
*CLOAD
24142,6,1500
** Output Requests
*output,field,Variable=ALL
*NODE FILE, FREQUENCY=99
U,V,RF,NT
*Restart, Write
*End Step
