*HEADING
Abaqus Job Created By SimLab 2017.2 .
*******************************************************************************
****		Created at 16:13:41, February 27,2018
****		NODES= 1469
****		ELEMENTS= 800
*******************************************************************************
**NSET COUNT = 1469
*NODE,NSET=NALL
1,                0.00000,        0.00000,      203.20000
2,                0.00000,       33.91643,      222.96590
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**
**ELSET COUNT = 800
**HWCOLOR COMP          1     0
*ELEMENT, TYPE=C3D10, ELSET=Solid1
       441,       747,       748,       749,       750,       801,       802,       803,
       804,       805,       806
       442,       747,       749,       748,       751,       803,       802,       801,
       807,       808,       809
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**
**Property Definitions
**
*SOLID SECTION, ELSET=Solid1, MATERIAL=Steel
**
**Material Definitions
**
**Material:Steel
*MATERIAL,NAME=Steel
*ELASTIC,TYPE=ISO
2.08000e+005,3.00000e-001
*DENSITY
7.80000e-009,
*SPECIFIC HEAT
5.00000e-001
*CONDUCTIVITY
4.98100e-002
**
**
**Face Constraint Face_Constraint_1
**
*NSET, NSET=Face_Constraint_1
       294,       295,       296,       297,       298,       299
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**
*BOUNDARY
**Fixed constraints:Face_Constraint_1
Face_Constraint_1,	1
Face_Constraint_1,	2
Face_Constraint_1,	3
Face_Constraint_1,	4
Face_Constraint_1,	5
Face_Constraint_1,	6
**
*Step,name=Step1,perturbation
Frequency Step
*Frequency,eigenSolver=Lanczos,acoustic coupling=off,normalization=displacement
10,1.000000,100.000000,1.002000, ,
** Output Requests
*output,field,Variable=ALL
*El Print, Frequency=1
*Node Print, Frequency=1
*Node File
*El File
*Restart, Write
*End Step
