*NODE
 1, 0.0, 0.0, 0.0
 2, 1.0, 0.0, 0.0
 3, 51.0, 0.0, 0.0
*ELEMENT, TYPE=B33, ELSET=EALL
 1, 1,2
*BEAM GENERAL SECTION, ELSET=EALL, DENSITY=100.0, SECTION=GENERAL
 2.5E-2 , 1.0E-4, 0.0E-4, 1.5E-4, 3.0E-5
 0.0, 0.0, -1.0
 100.0E2, 80.0E2
*NSET, NSET=NSET1
2
*SURFACE, NAME=SURF_1, TYPE=NODE
NSET1, 1.0
*COUPLING,CONSTRAINT NAME=KinCoup, REFNODE=3, SURFACE=SURF_1
*KINEMATIC
1,6
*STEP
*STATIC
*BOUNDARY
  1, 1,6
*CLOAD
 3, 4, 100
 3, 5, 75
 3, 6, 50
*NODE PRINT
 U, COORD
*END STEP
