*HEADING
Abaqus Job Created By SimLab 2017.2 .
*******************************************************************************
****		Created at 10:57:5, June 20,2018
****		NODES= 65
****		ELEMENTS= 27
*******************************************************************************
**NSET COUNT = 65
*NODE,NSET=NALL
1,                0.00000,        0.00000,      120.00000
2,               40.00000,        0.00000,      120.00000
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**
*ELEMENT,TYPE=DCOUP3D,ELSET=RBE_65
65, 65
*DISTRIBUTING COUPLING,ELSET=RBE_65
         1, 1.000000
         2, 1.000000
         3, 1.000000
         4, 1.000000
         5, 1.000000
         6, 1.000000
         7, 1.000000
         8, 1.000000
         9, 1.000000
        10, 1.000000
        11, 1.000000
        12, 1.000000
        13, 1.000000
        14, 1.000000
        15, 1.000000
        16, 1.000000
**HWCOLOR COMP         56     0
**
**ELSET COUNT = 27
**HWCOLOR COMP          1     0
*ELEMENT, TYPE=C3D8, ELSET=Body1
         1,         1,         5,         6,         2,        17,        21,        22,
        18
         2,         2,         6,         7,         3,        18,        22,        23,
        19
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**
**NSET COUNT = 16
*NSET, NSET=Coupling_nodes_set
         1,         2,         3,         4,         5,         6,         7,         8,
         9,        10,        11,        12,        13,        14,        15,        16,
**NSET COUNT = 16
*NSET, NSET=Fixed_face_set
        49,        50,        51,        52,        53,        54,        55,        56,
        57,        58,        59,        60,        61,        62,        63,        64,
**Property Definitions
**
*SOLID SECTION, ELSET=Body1, MATERIAL=Material1
**
**Material Definitions
**
**Material:Material1
*MATERIAL,NAME=Material1
*ELASTIC,TYPE=ISO
2.08000e+005,3.00000e-001
*DENSITY
7.80000e-009,
*SPECIFIC HEAT
5.00000e-001
*CONDUCTIVITY
4.98100e-002
**
**
**Face Constraint Face_Constraint_4
**
*NSET, NSET=Face_Constraint_4
        51,        52,        53,        54,        55,        56,        57,        58,
        59,        60,        61,        62,        63,        64,        49,        50,
**
**Force Force_3
*NSET, NSET=Force_3
        65,
*BOUNDARY
**Fixed constraints:Face_Constraint_4
Face_Constraint_4,	1
Face_Constraint_4,	2
Face_Constraint_4,	3
**
*Step,inc=100
*Static
1.0000,1.000000,
*CLOAD
Force_3,6,500.0e6
**
** Output Requests
*output,field,Variable=PRESELECT
*NODE PRINT, NSET=Coupling_nodes_set
U,
*NODE FILE, FREQUENCY=99
U,V,RF,NT
*Restart, Write
*End Step
